// SBML level 2 version 4
// Created by XMLPrettyPrinter on 4/8/2015 from

model Jana_WolfGlycolysis()

  // Compartments:
  compartment compartment = 1;

  // Species:
  species $src in compartment = 0;
  species $waste in compartment = 0;
  species $External_glucose in compartment = 0;
  species $ethanol in compartment = 0;
  species $Glycerol in compartment = 0;
  species $Sink in compartment = 0;
  species Glucose in compartment = 0;
  species fructose_1_6_bisphosphate in compartment = 0;
  species glyceraldehyde_3_phosphate in compartment = 0;
  species glycerate_3_phosphate in compartment = 0;
  species pyruvate in compartment = 0;
  species Acetyladehyde in compartment = 0;
  species External_acetaldehyde in compartment = 0;
  species ATP in compartment = 3;
  species NAD in compartment = 0.5;
  species ADP in compartment = 1;
  species NADH in compartment = 0.5;

  // Parameters:
  J0_inputFlux = 50;
  J1_k1 = 550;
  J1_Ki = 1;
  J1_n = 4;
  J2_J2_k = 9.8;
  J3_J3_k = 85.7;
  J4_kg = 323.8;
  J4_kp = 76411.1;
  J4_ka = 57823.1;
  J4_kk = 23.7;
  J5_J5_k = 80;
  J6_J6_k = 9.7;
  J7_J7_k = 2000;
  J8_J8_k1 = 375;
  J8_J8_k2 = 375;
  J9_J9_k = 28;
  J10_J10_k = 80;

  // Reactions:
  J0: $External_glucose => Glucose; J0_inputFlux;
  J1: 2 ATP + Glucose => 2 ADP + fructose_1_6_bisphosphate; J1_k1*Glucose*ATP*(1/(1 + (ATP/J1_Ki)^J1_n));
  J2: fructose_1_6_bisphosphate => glyceraldehyde_3_phosphate + glyceraldehyde_3_phosphate; J2_J2_k*fructose_1_6_bisphosphate;
  J3: NADH + glyceraldehyde_3_phosphate => $Glycerol + NAD; J3_J3_k*glyceraldehyde_3_phosphate*NADH;
  J4: NAD + ADP + glyceraldehyde_3_phosphate => NADH + glycerate_3_phosphate + ATP; (J4_kg*J4_kp*glyceraldehyde_3_phosphate*NAD*ADP - J4_ka*J4_kk*glycerate_3_phosphate*ATP*NADH)/(J4_ka*NADH + J4_kp*ADP);
  J5: ADP + glycerate_3_phosphate => pyruvate + ATP; J5_J5_k*glycerate_3_phosphate*ADP;
  J6: pyruvate => Acetyladehyde; J6_J6_k*pyruvate;
  J7: NADH + Acetyladehyde => $ethanol + NAD; J7_J7_k*Acetyladehyde*NADH;
  J8: Acetyladehyde => External_acetaldehyde; J8_J8_k1*Acetyladehyde - J8_J8_k2*External_acetaldehyde;
  J9: ATP => ADP; J9_J9_k*ATP;
  J10: External_acetaldehyde => $Sink; J10_J10_k*External_acetaldehyde;
end
